// COMSOL Multiphysics 6.4.0.293 model "CVD_Reactor_SingleZone_Complete.mph"
// Outline of the model tree

Parameters
  T_in = 293.15[K]  // Gas Inlet Temperature
  T_wafer = 1000[K]  // Susceptor Temp (within Hashimoto et al. 1990 validated range 973-1173K)
  u_in = 0.125[m/s]  // Feed Velocity (engineering assumption)
  p_0 = 1[atm]  // Baseline Pressure (matches Hashimoto et al. 1990 conditions)
  c_in = 1[mol/m^3]  // Precursor Conc. (normalized)
  D_F = 0.2e-4[m^2/s]  // Gas Diffusivity (Han et al. 2024, Si/C anode CVD)
  k_s = 3.88e6[m/s] * exp(-162000[J/mol]/(8.314[J/(mol*K)]*T_wafer))  // Surface reaction rate (Hashimoto et al. 1990)
  u_inner = 0.05[m/s]  // Inner zone feed velocity (engineering assumption)
  u_outer = 0.15[m/s]  // Outer zone feed velocity (engineering assumption)

Geometry
  geom1 "Geometry 1" (2D axisymmetric, length unit m)
    r1: Rectangle | size = {0.15, 0.02}
    r2: Rectangle | size = {0.005, 0.01}; pos = {0, 0.02}
    r3: Rectangle | size = {0.015, 0.01}; pos = {0.14, -0.01}
    r4: Rectangle | size = {0.005, 0.01}; pos = {0.005, 0.02}
    fin: Finalize "Form Union" | symmetriccoord = 8

Materials
  mat1: Common "Material 1" on all domains
    def: def "Basic"
      thermalconductivity = 0.01777
      dynamicviscosity = 22.83e-6[Pa*s]*(T/300[K])^(3/2)*(300[K]+157.16[K])/(T+157.16[K])
      heatcapacity = 520.3[J/(kg*K)]
      density = p_0*0.039948[kg/mol]/(8.314[J/(mol*K)]*T)

Physics
  spf: LaminarFlow on all domains
    dependent variable u = {u, v, w}
    fp1: FluidProperties (default)
    init1: init "Initial Values 1" (default)
    axi1: AxialSymmetry (default)
    wallbc1: WallBC "Wall 1" (default)
    inl1: InletBoundary "Inlet 1" on boundaries 5 | U0in = u_inner
    out1: OutletBoundary "Outlet 1" on boundaries 12
    inl2: InletBoundary "Inlet 2" on boundaries 8 | U0in = u_outer
  ht: HeatTransferInFluids on all domains
    dependent variable T
    fluid1: FluidHeatTransferModel "Fluid 1" (default)
    init1: init "Initial Values 1" (default)
    axi1: AxialSymmetry (default)
    ins1: ThermalInsulation (default)
    ifl1: Inflow on boundaries 5, 8 | Tustr = T_in
    temp1: TemperatureBoundary "Temperature 1" on boundaries 2 | T0 = T_wafer
  tds: DilutedSpecies "Transport of Diluted Species" on all domains
    dependent variable c
    cdm1: Fluid (default)
    axi1: AxialSymmetry (default)
    nflx1: NoFlux (default)
    init1: init "Initial Values 1" (default)
    in1: Inflow on boundaries 5, 8 | c0 = c_in
    out1: Outflow on boundaries 12
    fl1: FluxBoundary "Flux 1" on boundaries 2 | species = 1; J0 = -k_s*c

Multiphysics
  nitf1: NonIsothermalFlow on all domains | Fluid_physics = spf; Heat_physics = ht
  rfd1: ReactingFlowDS "Reacting Flow, Diluted Species 1" on all domains | Fluid_physics = spf; Species_physics = tds

Mesh
  mesh1 "Mesh 1" (physics-controlled)
    size: MeshSizeDefault | table = cfd; hauto = 4

Studies
  std1 "Study 1"
    stat: Stationary

Solver configurations
  sol1 "Solution 1" (study std1)
    v1: Variables "Dependent Variables 1"
    s1: Stationary "Stationary Solver 1"
      se1: Segregated
        ss1: SegregatedStep "Velocity u, Pressure p"
        ss2: SegregatedStep "Temperature"
        ss3: SegregatedStep "Concentration c"
        ll1: LowerLimit
      d1: Direct "Direct, fluid flow variables (spf)"
      d2: Direct "Direct, heat transfer variables (ht)"
      d3: Direct "Direct, concentrations (tds)"

Datasets
  dset1: Solution | solution = sol1
  rev1: Revolve2D "Revolution 2D" | data = dset1; startangle = -90; revangle = 225
  cln1: CutLine2D | data = dset1; genpoints = {{0.0775, -0.01}, {0.0775, 0.03}}

Derived values
  gev1: EvalGlobal "Global Evaluation 1" | data = dset1
  int1: IntLine "Line Integration 1" on boundaries 5, 8
    data = dset1
    table = tbl3
    expr = {, , tds.ntflux_c}
    descr = {, , Normal total flux}
    intsurface = on
  int2: IntLine "Line Integration 2" on boundaries 12 | data = dset1; table = tbl4; expr = tds.ntflux_c; intsurface = on

Plots
  pg1: PlotGroup2D "Velocity (spf)" | data = dset1
    surf1: Surface | expr = spf.U
  pg2: PlotGroup2D "Pressure (spf)" | data = dset1
    surf1: Surface | expr = p; bandcount = 25
  pg3: PlotGroup3D "Velocity, 3D (spf)" | data = rev1
    surf1: Surface | expr = spf.U
  pg4: PlotGroup2D "Temperature (ht)" | data = dset1
    surf1: Surface | expr = T
  pg5: PlotGroup2D "Concentration (tds)" | data = dset1
    surf1: Surface | expr = c
    arws1: ArrowSurface | expr = {tds.tflux_cr, tds.tflux_cz}; xnumber = 10; ynumber = 10
      sel1: Selection on domains 1-4
  pg6: PlotGroup3D "Concentration, 3D (tds)" | data = rev1; typeintitle = off
    surf1: Surface | expr = c
  pg7: PlotGroup2D "Temperature and Fluid Flow (nitf1)" | data = dset1
    surf1: Surface "Fluid Temperature" | expr = nitf1.T
      sel1: Selection on domains 1-4
    arws1: ArrowSurface "Fluid Flow" | expr = {nitf1.ur, nitf1.uz}; xnumber = 30; ynumber = 30; arrowlength = logarithmic
      col1: Color "Color Expression 1" | expr = spf.U
      filt1: Filter | expr = spf.U>nitf1.Uave
  pg8: PlotGroup1D "1D Plot Group 8" | data = dset1
    lngr1: LineGraph on boundaries 2 | data = dset1; expr = c; xdata = expr; xdataexpr = r
  pg9: PlotGroup1D "1D Plot Group 9" | data = dset1
    lngr1: LineGraph on boundaries 2 | data = dset1; expr = T; xdata = expr; xdataexpr = r

Exports
  plot1: Plot | filename = S:\multizone_ui005_uo015_T1000_radial.csv
  plot2: Plot | filename = S:\multizone_ui005_uo015_T1000_temperature.csv